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/BATCH
/COM,ANSYS RELEASE 2019 R2           BUILD 19.4      UP20190416       22:03:35
/input,menust,tmp,''
/GST,ON
/PLO,INFO,3
/GRO,CURL,ON
/CPLANE,1
WPSTYLE,,,,,,,,0
/input,beso_2020,in
/BATCH
/COM,ANSYS RELEASE 2019 R2           BUILD 19.4      UP20190416       22:16:31
/COM,ANSYS RELEASE 2019 R2           BUILD 19.4      UP20190416       22:16:31
/BATCH
/COM,ANSYS RELEASE 2019 R2           BUILD 19.4      UP20190416       22:19:06
/COM,ANSYS RELEASE 2019 R2           BUILD 19.4      UP20190416       22:19:06
/BATCH
/COM,ANSYS RELEASE 2019 R2           BUILD 19.4      UP20190416       22:23:19
/COM,ANSYS RELEASE 2019 R2           BUILD 19.4      UP20190416       22:23:19
/BATCH
/COM,ANSYS RELEASE 2019 R2           BUILD 19.4      UP20190416       22:28:44
/input,menust,tmp,''
/GST,ON
/PLO,INFO,3
/GRO,CURL,ON
/CPLANE,1
WPSTYLE,,,,,,,,0
/POST1
INRES,ALL
FILE,'beso_2020','rst','.'
set,last
plnsol,s,eqv
esel,s,mat,,1
nsle
/cont,1,8
plnsol,s,eqv
cmsel,u,passive_domain
/MREP,EPLOT
cmsel,u,passive_region
nsle
/post1
set,last
plnsol,s,eqv
esel,s,mat,,1
nsle
*SET,iter,21
*IF, iter, LT, 10, THEN
*SET,ER , 0.50
*ELSEIF, iter, GE, 10, AND, iter, LT, 30, THEN
*SET,ER , 0.30
*ELSEIF, iter, GE, 30, AND, iter, LT, 50, THEN
*SET,ER , 0.20
*ELSE
*SET,ER , 0.10
*ENDIF
FINISH
/CLE
/COM,ANSYS RELEASE 2019 R2           BUILD 19.4      UP20190416       22:41:29
/input,start,ans,'C:\Program Files\ANSYS Inc\v194\ANSYS\apdl\'
FINISH
! /EXIT,NOSAV
/BATCH
/COM,ANSYS RELEASE 2019 R2           BUILD 19.4      UP20190416       22:42:12
/COM,ANSYS RELEASE 2019 R2           BUILD 19.4      UP20190416       22:42:12
/BATCH
/COM,ANSYS RELEASE 2019 R2           BUILD 19.4      UP20190416       23:01:24
/COM,ANSYS RELEASE 2019 R2           BUILD 19.4      UP20190416       23:01:24
/BATCH
/COM,ANSYS RELEASE 2019 R2           BUILD 19.4      UP20190416       23:11:58
/input,menust,tmp,''
/GST,ON
/PLO,INFO,3
/GRO,CURL,ON
/CPLANE,1
WPSTYLE,,,,,,,,0
/POST1
INRES,ALL
FILE,'beso_2020','rst','.'
set,last
cmlist
cmsel,s,SOLID_TOPOLOGY_33
eplo
plnsol,s,eqv
/cont,1,8
/cont,1,8,0,,420
/UDOC,1,TYP2,0
/cont,1,8,0,,420
! /plnsol,e,eeq
/EFACET,1
PLNSOL, SEND,ELASTIC, 0,1.0
/cont,1,8
/cont,1,8,-.10,,1
/cont,1,8,0,,2
PLESOL, SENE,, 0,1.0
/cont,1,8
PLESOL, SEND,ELASTIC, 0,1.0
/EFACET,1
PLNSOL, EPEL,INT, 0,1.0
/EFACET,1
PLNSOL, EPTO,EQV, 0,1.0
/EFACET,1
PLNSOL, SEND,ELASTIC, 0,1.0
PLESOL, SENE,, 0,1.0
/cont,1,8,0,,35e3
/cont,1,8,0,,10e3
/cont,1,8,0,,1e3
FINISH
/CLE
/COM,ANSYS RELEASE 2019 R2           BUILD 19.4      UP20190416       23:18:01
/input,start,ans,'C:\Program Files\ANSYS Inc\v194\ANSYS\apdl\'
FINISH
! /EXIT,NOSAV
/BATCH
/COM,ANSYS RELEASE 2019 R2           BUILD 19.4      UP20190416       23:19:22
/COM,ANSYS RELEASE 2019 R2           BUILD 19.4      UP20190416       23:19:22
